# VARIABLES
variable num       equal  1 #labelling results only
variable N         equal  1000
variable len       equal  15
variable box       equal  100 # cubic box of volume 'box'

print "variable N        equal  $N" #for phase plot code to read out

# PARAMETERS
units lj
atom_style molecular
neighbor 0.4 bin
neigh_modify every 1 delay 1 check yes
comm_modify vel yes
comm_modify cutoff 1.9
#KG added cutoff to remove "Communication cutoff 1.52 is shorter than a bond length
#based estimate of 1.87. This may lead to errors" warning.

# READ
read_data input_data_nunchucks_${N}_${len}_${box}.file

#  BONDS
bond_style harmonic
special_bonds lj 0 1 1
bond_coeff * 500.0 0.98  # the wildcard (*) means to have the same for all bond types.
#0.98 is the distance between ball centres

# TEMP ANGLES
# WITH FLEXIBILITY TO ADJUST TO CONFINED ANGLE
angle_style harmonic
angle_coeff * 50.0  180
angle_coeff $((v_len-1)/2) 50.0  60    #flexible at central bond


# PAIR lj/cut --with interactions, to steady state
pair_style lj/cut 1.0
pair_modify shift yes
pair_coeff * * 1  1.0  1.12
#1.12 is cut-off for potential

fix 4 all nve
fix 5 all langevin 0.5 0.5 1 123456
fix recen1 all recenter INIT INIT INIT

# RUN
#allows molecules to stabilise at confine angle
run 5000

# ANGLES
# SET RIGID MOLECULES
angle_style harmonic
angle_coeff * 500.0  180
angle_coeff $((v_len-1)/2) 500.0  60    #flexible at central bond

reset_timestep 0

write_restart restart.time*
