# VARIABLES
variable num       equal  1 # labelling results only
variable N         equal  1000
variable len       equal  15
variable box       equal  100 # cubic box of volume 'box'

print "variable N        equal  $N" #for phase plot code to extract

# PARAMETERS
units lj
atom_style molecular
neighbor 0.4 bin
neigh_modify every 1 delay 1 check yes
comm_modify vel yes
comm_modify cutoff 1.9 # This must be longer than the bond length below


# READ
read_data input_data_nunchucks_${N}_${len}_${box}.file
# This determines the initial position and velocity of all molecules

#  BONDS
bond_style harmonic
special_bonds lj 0 1 1
bond_coeff * 500.0 0.98
#0.98 is the distance between ball centres

# ANGLES
angle_style harmonic
angle_coeff * 500.0  180
angle_coeff $((v_len-1)/2) 0.1  180  # opening angle rigidity and value


# PAIR lj/cut --with interactions, to steady state
pair_style lj/cut 1.0
pair_modify shift yes
pair_coeff * * 1  1.0  1.12
#1.12 is cut-off for potential

write_restart restart.time*  # starting config for in.run_loop
